#
# Complete simulation of 7 Nafion chains according to Sengupta's simulation
# protocol;
#

#
# General settings
#

units		real
atom_style	full

#
# Variable definitions
#

# Paths and file names
variable	project		index	"aem"						# project name
variable	source		index	../../../construction/constructed_setups/aem_chloride/seed_5	# data directory
variable	params		index	../../../construction/constructed_setups/aem_chloride/seed_5	# parameter directory
variable 	data_file	index 	${params}/dpd.data 					# initial data file

# System properties
variable	sys_temp	index	303.15		# system temperature, K
variable	an_temp		index	600		# annealing temperature, K
variable 	sys_press	index	1		# system pressure, atm
variable	tdamp		index	100		# temperature damping
variable	pdamp		index	100		# pressure damping

# Simulation settings
variable	cutoff		index	10.0		# standard cutoff
variable	charge_cutoff	index	10.0	# charge cutoff
variable	precision	index	0.001		# kspace precision
variable	vseed		index   705120		# velocity seed

# Energy minimization settings
variable 	etol       	index   0.0		# unitless stopping tolerance for energy
variable 	ftol       	index   1.0e-8		# stopping tolerance for force, Kcal/mol
variable	maxiter    	index   100000		# max number of iterations
variable 	maxeval    	index   100000		# max number of force/energy evaluations

# Times and time steps
variable	dtthermo	index	1000			# time step for thermo output
variable	timestep	index	1			# integration time step
variable	vmd_step	equal	500000		# time step for vmd xyz movie saving
variable	img_step	equal	500000		# time step for image saving
variable	atom_step_pre	index	50000			# time step for atom information dumping before target dump time
variable	atom_step	index	50000			# time step for atom information dumping during target dump time

#
# Interaction potential definition
#

pair_style	lj/cut/coul/long ${cutoff} ${charge_cutoff}
bond_style 	harmonic
angle_style	harmonic
special_bonds	lj/coul 0 0 0.5
dihedral_style 	opls
improper_style cvff
read_data 	${data_file}
include 	${params}/dpd.params


#
# Integration conditions
#

timestep 	${timestep}
kspace_style 	pppm		${precision}

#
# Output setup
#

# VMD movie
dump vmd_movie all xyz ${vmd_step} nafion.xyz
dump_modify vmd_movie element C Cl F H N H O c H

# LAMMPS images
dump lmp_img all image ${img_step} nafion_*.ppm type type
dump_modify lmp_img element C Cl F H N H O c H

# Atom information DUMP file for pre-collection period
dump lmp_pre_dump all custom ${atom_step_pre} pre_nafion.d id type x y z

#
# Replicate
#

replicate 2 2 2

#
# 1) Equilibration
#

# Print average values ever dtthermo steps
thermo_style 	custom step time density temp pe ke etotal press
thermo		${dtthermo}

# Run energy minimization - 0K (check) and optionally 1 atm pressure
#fix emin all box/relax iso 1.0
minimize ${etol} ${ftol} ${maxiter} ${maxeval}
#unfix emin

# Random initial velocity
velocity	all create ${sys_temp} ${vseed} &
		dist gaussian rot yes mom yes sum yes

#
# Water - make molecules rigid
#

group water type 6 7
fix wrig water shake 0.0001 20 0 b 8 a 14

#
# 2) NVT ensemble for 0.2 ns
#

fix nvt_1 all nvt temp ${sys_temp} ${sys_temp} ${tdamp}
run 200000
unfix nvt_1

#
# 3) Annealing  - 5 repetitions
#

# Below is a lammps loop that
# will execute 5 times
variable ij loop 5
label loop

# i) Heat up to 600K in 50 ps
fix an_nvt_1 all nvt temp ${sys_temp} ${an_temp} ${tdamp}
run 50000
unfix an_nvt_1

# ii) Maintian 600K for 50 ps
fix an_nvt_2 all nvt temp ${an_temp} ${an_temp} ${tdamp}
run 50000
unfix an_nvt_2

# iii) Cool down to 300K in 50 ps
fix an_nvt_3 all nvt temp ${an_temp} ${sys_temp} ${tdamp}
run 50000
unfix an_nvt_3

next ij
jump SELF loop

write_restart	annealing.restart

#
# 4) NVT ensemble for 0.2 ns at 300 K
#

fix nvt_2 all nvt temp ${sys_temp} ${sys_temp} ${tdamp}
run 200000
unfix nvt_2

write_restart	first_nvt.restart

#
# 5) NPT for 7 ns
#

# With pre-data collection settings
fix npt_1 all npt temp ${sys_temp} ${sys_temp} ${tdamp} &
		  iso ${sys_press} ${sys_press} ${pdamp}
run 4000000
unfix npt_1

# With target data collection settings
undump lmp_pre_dump
# Atom information DUMP file for collection period
dump lmp_dump all custom ${atom_step} ${project}.d id type x y z

# NPT and run
fix npt_2 all npt temp ${sys_temp} ${sys_temp} ${tdamp} &
		  iso ${sys_press} ${sys_press} ${pdamp}

#
# RDF and CN
#

# Compute RDF and CN for select types of pairs
compute nrdf all rdf 300 6 8 6 2 6 6 8 8
# The columns consists of
# steps | radial distance | RDF first pair | CN first pair | ...

# Save RDFs
# This will save an RDF and every 5000 steps without any time averaging
fix nrdfAve all ave/time 5000 1 5000 c_nrdf[*] file aem.rdf mode vector

#
# Diffusion coefficients
#

# Water
compute wMSD water msd
fix wdiffAve all ave/time 500 1 500 c_wMSD[1] c_wMSD[2] c_wMSD[3] c_wMSD[4] file aem.water_diff mode scalar

# Ion
group ion type 2
compute iMSD ion msd
fix idiffAve all ave/time 500 1 500 c_iMSD[1] c_iMSD[2] c_iMSD[3] c_iMSD[4] file aem.ion_diff mode scalar

# For saving
variable now equal time

run 3000000 every 500000 "write_restart intermediate_npt2_time_${now}_fs.restart"
unfix npt_2

#
# Remove other fixes
#

unfix wrig
unfix nrdfAve
unfix wdiffAve
unfix idiffAve

#
# Save final state
#

write_restart	${project}.restart
